# OpenSim document version 40500
InverseKinematicsTool:
  time_range: 0 32.28
  marker_file: P001_T001_armSwing_fast.trc
  IKTaskSet:
    IKMarkerTask RSHO: apply=true weight=1
    IKMarkerTask LSHO: apply=true weight=1
    IKMarkerTask C7: apply=true weight=1
    IKMarkerTask CLAV: apply=true weight=1
    IKMarkerTask RHHF: apply=true weight=1
    IKMarkerTask RHHB: apply=true weight=1
    IKMarkerTask LHHF: apply=true weight=1
    IKMarkerTask LHHB: apply=true weight=1
    IKMarkerTask RHGT: apply=true weight=1
    IKMarkerTask RHAR1: apply=true weight=1
    IKMarkerTask RHAR2: apply=true weight=1
    IKMarkerTask RHLE: apply=true weight=1
    IKMarkerTask RHME: apply=true weight=1
    IKMarkerTask RRAH: apply=true weight=1
    IKMarkerTask RRAD: apply=true weight=1
    IKMarkerTask RULN: apply=true weight=1
    IKMarkerTask LHGT: apply=true weight=1
    IKMarkerTask LHAR1: apply=true weight=1
    IKMarkerTask LHAR2: apply=true weight=1
    IKMarkerTask LHLE: apply=true weight=1
    IKMarkerTask LHME: apply=true weight=1
    IKMarkerTask LRAH: apply=true weight=1
    IKMarkerTask LRAD: apply=true weight=1
    IKMarkerTask LULN: apply=true weight=1
    IKMarkerTask RASI: apply=true weight=1
    IKMarkerTask LASI: apply=true weight=1
    IKMarkerTask RPSI: apply=true weight=1
    IKMarkerTask LPSI: apply=true weight=1
    IKMarkerTask RLAT: apply=true weight=1
    IKMarkerTask RSAT: apply=true weight=1
    IKMarkerTask RSAT1: apply=true weight=1
    IKMarkerTask RLFC: apply=true weight=1
    IKMarkerTask RMFC: apply=true weight=1
    IKMarkerTask RKNE: apply=true weight=1
    IKMarkerTask RLAN: apply=true weight=1
    IKMarkerTask RMAN: apply=true weight=1
    IKMarkerTask RHEE: apply=true weight=1
    IKMarkerTask RTOE: apply=true weight=1
    IKMarkerTask RSMT: apply=true weight=1
    IKMarkerTask LSAT1: apply=true weight=1
    IKMarkerTask LSAT: apply=true weight=1
    IKMarkerTask LLAT: apply=true weight=1
    IKMarkerTask LLFC: apply=true weight=1
    IKMarkerTask LMFC: apply=true weight=1
    IKMarkerTask LKNE: apply=true weight=1
    IKMarkerTask LLAN: apply=true weight=1
    IKMarkerTask LMAN: apply=true weight=1
    IKMarkerTask LHEE: apply=true weight=1
    IKMarkerTask LTOE: apply=true weight=1
    IKMarkerTask LSMT: apply=true weight=1
    IKMarkerTask RMCI: apply=true weight=1
    IKMarkerTask RMCM: apply=true weight=1
    IKMarkerTask RMCR: apply=true weight=1
    IKMarkerTask LMCI: apply=true weight=1
    IKMarkerTask LMCM: apply=true weight=1
    IKMarkerTask LMCR: apply=true weight=1
    IKMarkerTask RMCA: apply=true weight=1
    IKMarkerTask STUR: apply=true weight=1
    IKMarkerTask HEAD: apply=true weight=1
    IKMarkerTask BARB: apply=true weight=1
