# OpenSim document version 40500
ScaleTool FullBodyModel_MuscleActuatedLowerLimb_TorqueActuatedUpperBody-scaled:
  mass: 75.337 [kg]
  height: -1
  age: -1
  ModelScaler:
    apply: true
    scaling_order: measurements
    marker_file: Static trial_3.trc
    time_range: 0 1.55
    preserve_mass_distribution: true
    MeasurementSet:
      Measurement pelvis_x: apply=false
        MarkerPair: markers=(LASI LPSI)
      Measurement pelvis_z: apply=true
        MarkerPair: markers=(LASI RASI)
        BodyScale pelvis: axes=(X Y Z)
      Measurement femur: apply=true
        MarkerPair: markers=(RLFC RSAT1)
        BodyScale femur_r: axes=(X Y Z)
        BodyScale femur_l: axes=(X Y Z)
      Measurement tibia: apply=true
        MarkerPair: markers=(RKNE RLAN)
        BodyScale tibia_r: axes=(X Y Z)
        BodyScale patella_r: axes=(X Y Z)
        BodyScale talus_r: axes=(X Y Z)
        BodyScale tibia_l: axes=(X Y Z)
        BodyScale patella_l: axes=(X Y Z)
        BodyScale talus_l: axes=(X Y Z)
      Measurement foot: apply=true
        MarkerPair: markers=(RTOE RHEE)
        BodyScale calcn_r: axes=(X Y Z)
        BodyScale toes_r: axes=(X Y Z)
        BodyScale calcn_l: axes=(X Y Z)
        BodyScale toes_l: axes=(X Y Z)
      Measurement humorous_y: apply=true
        MarkerPair: markers=(RHHF RHME)
        BodyScale humerus_r: axes=Y
        BodyScale humerus_l: axes=Y
      Measurement humorous_x: apply=true
        MarkerPair: markers=(RHHF RHAR1)
        BodyScale humerus_r: axes=X
        BodyScale humerus_l: axes=X
      Measurement humrous_z: apply=true
        MarkerPair: markers=(RHLE RHME)
        BodyScale humerus_r: axes=Z
        BodyScale humerus_l: axes=Z
      Measurement forearm_x: apply=true
        MarkerPair: markers=(RRAH RMCI)
        BodyScale ulna_r: axes=X
        BodyScale radius_r: axes=X
        BodyScale ulna_l: axes=X
        BodyScale radius_l: axes=X
      Measurement forearm_y: apply=true
        MarkerPair: markers=(RRAD RHLE)
        BodyScale ulna_r: axes=Y
        BodyScale radius_r: axes=Y
        BodyScale ulna_l: axes=Y
        BodyScale radius_l: axes=Y
      Measurement forearm_z: apply=true
        MarkerPair: markers=(RHLE RHME)
        BodyScale ulna_r: axes=Z
        BodyScale radius_r: axes=Z
        BodyScale ulna_l: axes=Z
        BodyScale radius_l: axes=Z
      Measurement hand_x: apply=true
        MarkerPair: markers=(RRAH RMCI)
        BodyScale hand_r: axes=X
        BodyScale hand_l: axes=X
      Measurement hand_y: apply=true
        MarkerPair: markers=(RMCI RRAD)
        BodyScale hand_r: axes=Y
        BodyScale hand_l: axes=Y
      Measurement hand_z: apply=true
        MarkerPair: markers=(RMCI RMCA)
        BodyScale hand_r: axes=Z
        BodyScale hand_l: axes=Z
      Measurement torso_x: apply=true
        MarkerPair: markers=(C7 STUR)
        BodyScale torso: axes=X
      Measurement torso_z: apply=true
        MarkerPair: markers=(LSHO RSHO)
        BodyScale torso: axes=Z
      Measurement torso_y: apply=true
        MarkerPair: markers=(HEAD RASI)
        BodyScale torso: axes=Y
  MarkerPlacer:
    apply: true
    marker_file: Static trial_3.trc
    time_range: 0 1.55
    max_marker_movement: -1
    IKTaskSet:
      IKMarkerTask RSHO: apply=true weight=50
      IKMarkerTask LSHO: apply=true weight=50
      IKMarkerTask C7: apply=true weight=1
      IKMarkerTask CLAV: apply=true weight=100
      IKMarkerTask RHHF: apply=true weight=1
      IKMarkerTask RHHB: apply=true weight=1
      IKMarkerTask LHHF: apply=true weight=1
      IKMarkerTask LHHB: apply=true weight=1
      IKMarkerTask RSJC: apply=false weight=1
      IKMarkerTask RHGT: apply=true weight=1
      IKMarkerTask RHAR1: apply=true weight=1
      IKMarkerTask RHAR2: apply=true weight=1
      IKMarkerTask RHLE: apply=true weight=50
      IKMarkerTask RHME: apply=true weight=1
      IKMarkerTask RRAH: apply=true weight=100
      IKMarkerTask RRAD: apply=true weight=1
      IKMarkerTask RULN: apply=true weight=1
      IKMarkerTask LSJC: apply=false weight=1
      IKMarkerTask LHGT: apply=true weight=50
      IKMarkerTask LHAR1: apply=true weight=1
      IKMarkerTask LHAR2: apply=true weight=1
      IKMarkerTask LHLE: apply=true weight=50
      IKMarkerTask LHME: apply=true weight=1
      IKMarkerTask LRAH: apply=true weight=100
      IKMarkerTask LRAD: apply=true weight=1
      IKMarkerTask LULN: apply=true weight=1
      IKMarkerTask RASI: apply=true weight=50
      IKMarkerTask LASI: apply=true weight=50
      IKMarkerTask RPSI: apply=true weight=50
      IKMarkerTask LPSI: apply=true weight=50
      IKMarkerTask LHJC: apply=false weight=1
      IKMarkerTask RHJC: apply=false weight=1
      IKMarkerTask RLAT: apply=true weight=50
      IKMarkerTask RSAT: apply=true weight=1
      IKMarkerTask RSAT1: apply=true weight=50
      IKMarkerTask RLFC: apply=true weight=1
      IKMarkerTask RMFC: apply=true weight=1
      IKMarkerTask RKJC: apply=false weight=1
      IKMarkerTask RKNE: apply=true weight=50
      IKMarkerTask RLAN: apply=true weight=1
      IKMarkerTask RMAN: apply=true weight=1
      IKMarkerTask RAJC: apply=false weight=1
      IKMarkerTask RHEE: apply=true weight=50
      IKMarkerTask RTOE: apply=true weight=50
      IKMarkerTask RSMT: apply=true weight=50
      IKMarkerTask LSAT1: apply=true weight=50
      IKMarkerTask LSAT: apply=true weight=1
      IKMarkerTask LLAT: apply=true weight=50
      IKMarkerTask LLFC: apply=true weight=1
      IKMarkerTask LMFC: apply=true weight=1
      IKMarkerTask LKJC: apply=false weight=1
      IKMarkerTask LKNE: apply=true weight=50
      IKMarkerTask LLAN: apply=true weight=1
      IKMarkerTask LMAN: apply=true weight=1
      IKMarkerTask LAJC: apply=false weight=1
      IKMarkerTask LHEE: apply=true weight=50
      IKMarkerTask LTOE: apply=true weight=50
      IKMarkerTask LSMT: apply=true weight=50
      IKMarkerTask REJC: apply=false weight=1
      IKMarkerTask LEJC: apply=false weight=1
      IKMarkerTask R_tibial_plateau: apply=false weight=1
      IKMarkerTask L_tibial_plateau: apply=false weight=1
      IKMarkerTask RMCI: apply=true weight=1
      IKMarkerTask RMCM: apply=true weight=1
      IKMarkerTask RMCR: apply=true weight=50
      IKMarkerTask LMCI: apply=true weight=1
      IKMarkerTask LMCM: apply=true weight=1
      IKMarkerTask LMCR: apply=true weight=50
      IKMarkerTask RMCA: apply=true weight=1
      IKMarkerTask STUR: apply=false weight=1
      IKMarkerTask HEAD: apply=false weight=1
      IKMarkerTask BARB: apply=false weight=1
