# OpenSim document version 40500
ScaleTool FullBodyModel_MuscleActuatedLowerLimb_TorqueActuatedUpperBody-scaled:
  mass: 75.337 [kg]
  height: -1
  age: -1
  ModelScaler:
    apply: true
    scaling_order: measurements
    marker_file: ../steven - static trial01.trc
    time_range: 0 5.81
    preserve_mass_distribution: false
    MeasurementSet:
      Measurement pelvis_x: apply=true
        MarkerPair: markers=(LPSI LASI)
        BodyScale pelvis: axes=X
      Measurement pelvis_y: apply=true
        MarkerPair: markers=(LPSI LASI)
        BodyScale pelvis: axes=Y
      Measurement pelvis_z: apply=true
        MarkerPair: markers=(LASI RASI)
        BodyScale pelvis: axes=Z
      Measurement femur_x: apply=true
        MarkerPair: markers=(RSAT1 RLAT)
        BodyScale femur_r: axes=X
        BodyScale femur_l: axes=X
      Measurement femur_y: apply=true
        MarkerPair: markers=(RLFC RSAT1)
        BodyScale femur_r: axes=Y
        BodyScale femur_l: axes=Y
      Measurement femur_z: apply=true
        MarkerPair: markers=(LLFC LMFC)
        BodyScale femur_r: axes=Z
        BodyScale femur_l: axes=Z
      Measurement tibia: apply=true
        MarkerPair: markers=(RKNE RLAN)
        BodyScale tibia_r: axes=(X Y Z)
        BodyScale tibia_l: axes=(X Y Z)
      Measurement patella: apply=true
        MarkerPair: markers=(LLFC LMFC)
        BodyScale patella_r: axes=(X Y Z)
        BodyScale patella_l: axes=(X Y Z)
      Measurement talus: apply=true
        MarkerPair: markers=(RLAN RMAN)
        BodyScale talus_r: axes=(X Y Z)
        BodyScale talus_l: axes=(X Y Z)
      Measurement calcn: apply=true
        MarkerPair: markers=(RHEE RLAN)
        BodyScale calcn_r: axes=(X Y Z)
        BodyScale calcn_l: axes=(X Y Z)
      Measurement toes: apply=true
        MarkerPair: markers=(LSMT LTOE)
        BodyScale toes_r: axes=(X Y Z)
        BodyScale toes_l: axes=(X Y Z)
      Measurement torso_x: apply=true
        MarkerPair: markers=(STUR BARB)
        BodyScale torso: axes=X
      Measurement torso_y: apply=true
        MarkerPair: markers=(STUR C7)
        BodyScale torso: axes=Y
      Measurement torso_z: apply=true
        MarkerPair: markers=(RSHO LSHO)
        BodyScale torso: axes=Z
      Measurement humerus_x: apply=true
        MarkerPair: markers=(RHGT RHAR2)
        BodyScale humerus_r: axes=X
        BodyScale humerus_l: axes=X
      Measurement humerus_y: apply=true
        MarkerPair: markers=(RHLE RHGT)
        BodyScale humerus_r: axes=Y
        BodyScale humerus_l: axes=Y
      Measurement humerus_z: apply=true
        MarkerPair: markers=(RHLE RHME)
        BodyScale humerus_r: axes=Z
        BodyScale humerus_l: axes=Z
      Measurement radius_z: apply=true
        MarkerPair: markers=(RRAD RULN)
        BodyScale radius_r: axes=(X Y Z)
        BodyScale radius_l: axes=(X Y Z)
      Measurement ulna_z: apply=true
        MarkerPair: markers=(RRAD RULN)
        BodyScale ulna_r: axes=(X Y Z)
        BodyScale ulna_l: axes=(X Y Z)
      Measurement hand: apply=true
        MarkerPair: markers=(RMCI RMCR)
        BodyScale hand_r: axes=(X Y Z)
        BodyScale hand_l: axes=(X Y Z)
  MarkerPlacer:
    apply: true
    marker_file: ../steven - static trial01.trc
    time_range: 0 5.81
    max_marker_movement: -1
    IKTaskSet:
      IKMarkerTask RSHO: apply=true weight=1
      IKMarkerTask LSHO: apply=true weight=1
      IKMarkerTask C7: apply=true weight=1
      IKMarkerTask CLAV: apply=true weight=1
      IKMarkerTask RHHF: apply=true weight=1
      IKMarkerTask RHHB: apply=true weight=1
      IKMarkerTask LHHF: apply=true weight=1
      IKMarkerTask LHHB: apply=true weight=1
      IKMarkerTask RSJC: apply=false weight=1
      IKMarkerTask RHGT: apply=true weight=1
      IKMarkerTask RHAR1: apply=true weight=1
      IKMarkerTask RHAR2: apply=true weight=1
      IKMarkerTask RHLE: apply=true weight=1
      IKMarkerTask RHME: apply=true weight=1
      IKMarkerTask RRAH: apply=true weight=1
      IKMarkerTask RRAD: apply=true weight=1
      IKMarkerTask RULN: apply=true weight=1
      IKMarkerTask LSJC: apply=false weight=1
      IKMarkerTask LHGT: apply=true weight=1
      IKMarkerTask LHAR1: apply=true weight=1
      IKMarkerTask LHAR2: apply=true weight=1
      IKMarkerTask LHLE: apply=true weight=1
      IKMarkerTask LHME: apply=true weight=1
      IKMarkerTask LRAH: apply=true weight=1
      IKMarkerTask LRAD: apply=true weight=1
      IKMarkerTask LULN: apply=true weight=1
      IKMarkerTask RASI: apply=true weight=1
      IKMarkerTask LASI: apply=true weight=1
      IKMarkerTask RPSI: apply=true weight=1
      IKMarkerTask LPSI: apply=true weight=1
      IKMarkerTask LHJC: apply=false weight=1
      IKMarkerTask RHJC: apply=false weight=1
      IKMarkerTask RLAT: apply=true weight=1
      IKMarkerTask RSAT: apply=true weight=1
      IKMarkerTask RSAT1: apply=true weight=1
      IKMarkerTask RLFC: apply=true weight=1
      IKMarkerTask RMFC: apply=true weight=1
      IKMarkerTask RKJC: apply=false weight=1
      IKMarkerTask RKNE: apply=true weight=1
      IKMarkerTask RLAN: apply=true weight=1
      IKMarkerTask RMAN: apply=true weight=1
      IKMarkerTask RAJC: apply=false weight=1
      IKMarkerTask RHEE: apply=true weight=1
      IKMarkerTask RTOE: apply=true weight=1
      IKMarkerTask RSMT: apply=true weight=1
      IKMarkerTask LSAT1: apply=true weight=1
      IKMarkerTask LSAT: apply=true weight=1
      IKMarkerTask LLAT: apply=true weight=1
      IKMarkerTask LLFC: apply=true weight=1
      IKMarkerTask LMFC: apply=true weight=1
      IKMarkerTask LKJC: apply=false weight=1
      IKMarkerTask LKNE: apply=true weight=1
      IKMarkerTask LLAN: apply=true weight=1
      IKMarkerTask LMAN: apply=true weight=1
      IKMarkerTask LAJC: apply=false weight=1
      IKMarkerTask LHEE: apply=true weight=1
      IKMarkerTask LTOE: apply=true weight=1
      IKMarkerTask LSMT: apply=true weight=1
      IKMarkerTask REJC: apply=false weight=1
      IKMarkerTask LEJC: apply=false weight=1
      IKMarkerTask R_tibial_plateau: apply=false weight=1
      IKMarkerTask L_tibial_plateau: apply=false weight=1
      IKMarkerTask RMCI: apply=true weight=1
      IKMarkerTask RMCM: apply=true weight=1
      IKMarkerTask RMCR: apply=true weight=1
      IKMarkerTask LMCI: apply=true weight=1
      IKMarkerTask LMCM: apply=true weight=1
      IKMarkerTask LMCR: apply=true weight=1
      IKMarkerTask RMCA: apply=true weight=1
      IKMarkerTask STUR: apply=true weight=1
      IKMarkerTask HEAD: apply=true weight=1
      IKMarkerTask BARB: apply=true weight=1
