# OpenSim document version 40000
InverseKinematicsTool subject01:
  results_directory: ./
  model_file: subject01_simbody.osim
  constraint_weight: 20
  accuracy: 1e-5
  time_range: 11 302.6
  output_motion_file: D:\Neuro-Robotics lab\Minh's research\Squat-pic-stand experiment\Outputs\S01\20200207\IK\S01_IK_trial.mot
  report_errors: true
  marker_file: ../Dynamics/Motion_Data/S01_trial.trc
  IKTaskSet gait2392_IK:
    IKMarkerTask Sternum: apply=true weight=1
    IKMarkerTask R.Acromium: apply=true weight=0.5
    IKMarkerTask L.Acromium: apply=true weight=0.5
    IKMarkerTask Top.Head: apply=true weight=0.1
    IKMarkerTask R.ASIS: apply=true weight=1
    IKMarkerTask L.ASIS: apply=true weight=1
    IKMarkerTask V.Sacral: apply=true weight=10
    IKMarkerTask R.Thigh.Upper: apply=true weight=10
    IKMarkerTask R.Thigh.Front: apply=true weight=10
    IKMarkerTask R.Thigh.Rear: apply=true weight=10
    IKMarkerTask R.Shank.Upper: apply=true weight=10
    IKMarkerTask R.Shank.Front: apply=true weight=10
    IKMarkerTask R.Shank.Rear: apply=true weight=10
    IKMarkerTask R.Heel: apply=true weight=10
    IKMarkerTask R.Midfoot.Sup: apply=true weight=10
    IKMarkerTask R.Midfoot.Lat: apply=true weight=10
    IKMarkerTask R.Toe.Lat: apply=true weight=10
    IKMarkerTask R.Toe.Med: apply=true weight=10
    IKMarkerTask R.Toe.Tip: apply=true weight=10
    IKMarkerTask L.Thigh.Upper: apply=true weight=10
    IKMarkerTask L.Thigh.Front: apply=true weight=10
    IKMarkerTask L.Thigh.Rear: apply=true weight=10
    IKMarkerTask L.Shank.Upper: apply=true weight=10
    IKMarkerTask L.Shank.Front: apply=true weight=10
    IKMarkerTask L.Shank.Rear: apply=true weight=10
    IKMarkerTask L.Heel: apply=true weight=10
    IKMarkerTask L.Midfoot.Sup: apply=true weight=10
    IKMarkerTask L.Midfoot.Lat: apply=true weight=10
    IKMarkerTask L.Toe.Lat: apply=true weight=10
    IKMarkerTask L.Toe.Med: apply=true weight=10
    IKMarkerTask L.Toe.Tip: apply=true weight=10
    IKCoordinateTask subtalar_angle_r: apply=false weight=1000 value_type=default_value value=0
    IKCoordinateTask mtp_angle_r: apply=false weight=1000 value_type=default_value value=0
    IKCoordinateTask subtalar_angle_l: apply=false weight=1000 value_type=default_value value=0
    IKCoordinateTask mtp_angle_l: apply=false weight=1000 value_type=default_value value=0
